# [reference: watersteampro.xmcd]
G := 138.844*kg/s
d := 1.08 m
n := 60*1/s
p_0 := 24.5 MPa
t_0 := 560 °C
s_0 := wspSPT(p_0, t_0) = 6234.85 m^2/(K*s^2)
h_0 := wspHPT(p_0, t_0) = 3376824 m^2/s^2
u := π*d*n = 203.575 m/s
c_0 := 0*m/s
H_0 := [90; 100]*kJ/kg
i := 0 .. (rows(H_0) - 1)
ρ := 0.1
H_0c := (1 - ρ)*H_0 = [81000; 90000] m^2/s^2
H_0r := ρ*H_0 = [9; 10] kJ/kg
h_1t := h_0 - H_0c = [3295.82; 3286.82] kJ/kg
p_1[i] := wspPHS(h_1t[i], s_0)
p_1 = [18984676; 18437066] Pa
v_1t[i] := wspVHS(h_1t[i], s_0)
v_1t = [0.0162502; 0.0166232] m^3/kg
c_1t := sqrt(2*H_0c) = [402.492; 424.264] m/s
a_1t[i] := wspWPH(p_1[i], h_1t[i])
a_1t = [630.901; 628.63] m/s
M_1t := c_1t/a_1t = [0.637964; 0.674902]
μ'_1 := 0.97
F_1 := G*v_1t/(μ'_1*c_1t) = [0.00577906; 0.00560833] m^2
α_1e := 15 deg
el_1 := F_1/(π*d*sin(α_1e)) = [0.00658093; 0.00638651] m
e_opt := 4*sqrt(el_1/m) = [0.324492; 0.319663]
l_1 := el_1/e_opt = [20.2807; 19.9789] mm
# Выбираем профиль С-90-15А. Тогда
b_1 := 51.5 mm
M_1t.opt < 0.85
t_opt := [0.72; 0.87]
α_0.calc := [70; 120]
a_1e := [13; 17]
μ_1 := 0.982 - 0.005*(b_1/l_1) = [0.969303; 0.969111]
t_1opt := 0.75
z_1 := π*d*e_opt/(b_1*t_1opt) = [28.5042; 28.08]
z_1[i] :=
    round(z_1[i]) + mod(round(z_1[i]), 2) if round(z_1[i]) + mod(round(z_1[i]), 2) - z_1[i] < 1
    (round(z_1[i]) - mod(round(z_1[i]), 2)) otherwise
z_1 = [28; 28]
t_1 := π*d*e_opt/(b_1*z_1) = [0.763505; 0.752143]
t_1 < max(t_opt) = [1; 1]
α_ust := 38 deg
ξ_c := 6.5 %
ϕ := sqrt(1 - ξ_c) = 0.966954
ϕ' := 0.98 - 0.008*(b_1/l_1) = [0.959685; 0.959378]
b_1/l_1 = [2.53936; 2.57772]
ϕ/ϕ' = [1.00757; 1.0079]  # Ништяк
c_1 := c_1t*ϕ = [389.191; 410.244] m/s
α_1 := asin(μ_1/ϕ*sin(α_1e)) = [15.0373; 15.0343] deg
w_1[i] := sqrt(c_1[i]^2 + u^2 - 2*c_1[i]*u*cos(α_1[i]))
w_1 = [199.699; 220.066] m/s
β_1 := atan(sin(α_1)/(cos(α_1) - u/c_1)) = [30.3736; 28.9183] deg
ΔH_c[i] := c_1t[i]^2/2*(1 - ϕ^2)
ΔH_c = [5.265; 5.85] kJ/kg
h_1 := h_1t + ΔH_c = [3301.09; 3292.67] kJ/kg
s_1[i] := wspSPH(p_1[i], h_1[i])
s_1 = [6241.54; 6242.34] m^2/(K*s^2)
h_2t := h_1 - H_0r = [3292089; 3282674] m^2/s^2
v_2t[i] := wspVHS(h_2t[i], s_1[i])
v_2t = [0.0166869; 0.0171239] m^3/kg
p_2[i] := wspPHS(h_2t[i], s_1[i])
p_2 = [18439181; 17845627] Pa
a_2t[i] := wspWHS(h_2t[i], s_1[i])
a_2t = [629.847; 627.48] m/s
w_2t[i] := sqrt(2*H_0r[i] + w_1[i]^2)
w_2t = [240.582; 261.59] m/s
H_0r = [9000; 10000] m^2/s^2
Δ := 0.003 m
l_2 := l_1 + Δ = [0.0232807; 0.0229789] m
M_2t := w_2t/a_2t = [0.381968; 0.41689]
β_1 = [30.3736; 28.9183] deg
# Пусть выбран профиль рабочей решетки Р-30-21-А
b_2 := 25.6 mm
μ_2 := 0.965 - 0.01*(b_2/l_2) = [0.954004; 0.953859]
F_2[i] := G*v_2t[i]/(μ_2[i]*w_2t[i])
F_2 = [100.946; 95.2849] cm^2
β_2e[i] := asin(x[i]) == (F_2[i]/(e_opt[i]*π*d*l_2[i])) solve, x[i] → sin(0.294731376096*[3154572864317*m^2/312500000000000; 476424575146677*m^2/50000000000000000][i]/(m*[32449163427522693/100000000000000000; 31966258010212317/100000000000000000][i]*[232807271422017*m/10000000000000000; 229789112563827*m/10000000000000000][i]))
sin(F_2[i]/(e_opt[i]*π*d*l_2[i])) = [21.9864; 21.3757] deg
β_2e = [21.9864; 21.3757] deg
β_1 = [30.3736; 28.9183] deg
M_2t = [0.381968; 0.41689]
# Профиль подходит по всем параметрам
t_2opt := 0.6
z_2 := π*d*e_opt/(b_2*t_2opt) = [71.678; 70.6113]
z_2[i] :=
    round(z_2[i]) + mod(round(z_2[i]), 2) if round(z_2[i]) + mod(round(z_2[i]), 2) - z_2[i] < 1
    (round(z_2[i]) - mod(round(z_2[i]), 2)) otherwise
z_2 = [72; 70]
t_2 := π*d*e_opt/(b_2*z_2) = [0.597317; 0.60524]
β_ust := 81 deg
ζ_r := 10.5 %
ψ := sqrt(1 - ζ_r) = 0.946044
b_2/l_2 = [1.09962; 1.11406]
ψ' := 0.96 - 0.014*b_2/l_2 = [0.944605; 0.944403]
ψ/ψ' = [1.00152; 1.00174]  # Ништячелло
w_2 := w_2t*ψ = [227.601; 247.476] m/s
β_2[i] := asin(μ_2[i]/ψ*sin(β_2e[i]))
β_2 = [22.1811; 21.561] deg
c_2[i] := sqrt(w_2[i]^2 + u^2 - 2*w_2[i]*u*cos(β_2[i]))
c_2 = [86.2272; 94.751] m/s
α_2[i] := atan(sin(β_2[i])/(cos(β_2[i]) - u/w_2[i]))
α_2 = [85.2222; 73.7062] deg
ΔH_r[i] := w_2t[i]^2/2*(1 - ψ^2)
ΔH_r = [3038.67; 3592.54] m^2/s^2
ΔH_vs[i] := c_2[i]^2/2
ΔH_vs = [3717.56; 4488.88] m^2/s^2
χ_vs := 0
E_0 := H_0 - χ_vs*ΔH_vs = [90000; 100000] m^2/s^2
η_ol := (E_0 - ΔH_c - ΔH_r - (1 - χ_vs)*ΔH_vs)/E_0 = [0.866431; 0.860686]
η'_ol[i] := u*(c_1[i]*cos(α_1[i]) + c_2[i]*cos(α_2[i]))/E_0[i]
η'_ol = [0.866431; 0.860686]
η'_ol/η_ol = [1; 1]  # ЗАЕБИСЬ
c_f := sqrt(2*H_0) = [424.264; 447.214] m/s
u_c_f := u/c_f = [0.479831; 0.455208]
u_c_f.opt := ϕ*cos(α_1)/(2*sqrt(1 - ρ)) = [0.492178; 0.492185]
d_p := d + l_2 = [1.10328; 1.10298] m
μ_a := 0.5
δ_a := 0.0025 m
μ_r := 0.75
δ_r := 0.001*d_p = [0.00110328; 0.00110298] m
z := 8
δ_e[i] := (1/(μ_a*δ_a)^2 + z/(μ_r*δ_r[i])^2)^-0.5
δ_e = [0.000284854; 0.00028478] m  # del
ζ_b.y[i] := π*d_p[i]*δ_e[i]*η_ol[i]/F_1[i]
ζ_b.y = [0.148025; 0.151439]
ΔH_y[i] := ζ_b.y[i]*E_0[i]
ΔH_y = [13.3223; 15.1439] kJ
k_tr := 0.7*10^-3
ζ_d.tr[i] := k_tr*d^2/F_1[i]*u_c_f[i]^3
ζ_d.tr = [1.56083; 1.37323] %
ΔH_d.tr[i] := ζ_d.tr[i]*E_0[i]
ΔH_d.tr = [1404.74; 1373.23] m^2/s^2
k_v := 0.065
m_ := 1
ζ_v[i] := k_v/sin(α_1e)*(1 - e_opt[i])/e_opt[i]*u_c_f[i]^3*m_
ζ_v = [5.77577; 5.04173] %
B_2 := b_2*sin(β_ust) = 0.0252848 m
i_ := 4
ζ_segm[i] := 0.25*B_2*l_2[i]/F_1[i]*u_c_f[i]*η_ol[i]*i_
ζ_segm = [4.23469; 4.05892] %
ζ_partial := ζ_segm + ζ_v = [0.100105; 0.0910065]
ΔH_partial[i] := E_0[i]*ζ_partial[i]
ΔH_partial = [9009.42; 9100.65] m^2/s^2
H_i[i] := E_0[i] - ΔH_c[i] - ΔH_r[i] - (1 - χ_vs)*ΔH_vs[i] - ΔH_y[i] - ΔH_d.tr[i] - ΔH_partial[i]
H_i = [54.2423; 60.4508] kJ
η_oi := H_i/E_0 = [0.602693; 0.604508]
N_i := G*H_i = [7531224; 8393232] W
W_min := 0.234 cm^3
σ_izg[i] := (G*H_0[i]*η_ol[i]*l_2[i])/(2*u*z_2[i]*W_min*e_opt[i])
σ_izg = [113.238; 128.807] MPa
σ_izgII := 20 MPa
b_2new := b_2*sqrt(σ_izg/σ_izgII) = [60.9146; 64.9674] mm
ω := 2*π*n = 376.991 1/s
σ_r := 0.5*7800*kg/m^3*ω^2*d*l_2 = [13.9363; 13.7556] MPa
